OpenVSP model (file version 4), 7 components.
Geometry view with OpenVSP parameter names; values to 6 digits, angles in degrees, lengths in the model's unit.
Overall bounding box: X_Min=-4.8 X_Len=11.4 Y_Min=-9.31549 Y_Len=18.631 Z_Min=-0.1 Z_Len=3.66003

Wing "WingGeom"
  location (X Y Z) 0 0 0, rotation 0 0 0
  symmetric about XZ
  bounding box size 1.87928 18.631 0.643253
  totals: TotalSpan=18.5318 TotalProjectedSpan=18.5192 TotalChord=1.51386 TotalArea=28 TotalAR=12.2486 RelativeDihedralFlag=1
  root: chord 1.87928, twist 0, NACA 63-series A=0 IdealCl=0 ThickChord=0.1
  sections:
    n  Span     Root_Chord  Tip_Chord  Area     Sweep  Sweep_Location  Dihedral  Twist  Twist_Location  tip airfoil
    1  4.56769  1.87928     1.56606    7.86861  0      0               3         0      0.25            as above
    2  4.69819  1.56606     1.04404    6.13139  0      0               0         0      0.25            NACA 63-series A=0 IdealCl=0 ThickChord=0.12

Fuselage "FuselageGeom"
  location (X Y Z) -4.8 0 0.9, rotation 0 0 0
  bounding box size 11 2 2
  Design: Length=11
  cross sections:
    n  XLocPercent  YLocPercent  ZLocPercent  shape
    0  0            0            -0.0271739   point
    1  0.23         0            0            circle Circle_Diameter=2
    2  0.5          0            0            as above
    3  0.75         0            0            as above
    4  1            0            0.0894022    point

Custom "SeatGroup", child of "FuselageGeom"
  location (X Y Z) 2.333 -0.525 0.344643, rotation 0 -90 0
  bounding box size 4.88341 1.55 1.14618
  Design: BackAngle=25 BackHeight=0.8 BackThick=0.1 SeatHeight=0.35 SeatLength=0.5 Width=0.5
  Layout: AisleWidth=0.55 NumLeft=0 NumMiddle=2 NumRight=0 NumRow=5 SeatGap=0.55 SeatPitch=1
  custom script SeatGroup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

Conformal "ConformalGeom", child of "FuselageGeom"
  location (X Y Z) -4.8 0 0.9, rotation 0 0 0; relative location 0 0 0, rotation 0 0 0
  bounding box size 2.36807 1.6 1.6
  Design: ChordTrimFlag=0 ChordTrimMax=0.9 ChordTrimMin=0.1 Offset=0.2 UTrimFlag=1 UTrimMax=0.94 UTrimMin=0.72 V1TrimBegin=0.3 V1TrimEnd=1 V1TrimFlag=0 V2TrimBegin=0.25 V2TrimEnd=0.75 V2TrimFlag=0

Custom "SeatGroup", child of "FuselageGeom"
  location (X Y Z) -3 -0.47 0.345, rotation 0 -90 0
  bounding box size 0.88341 1.45 1.14618
  Design: BackAngle=25 BackHeight=0.8 BackThick=0.1 SeatHeight=0.35 SeatLength=0.5 Width=0.5
  Layout: AisleWidth=0.5 NumLeft=0 NumMiddle=2 NumRight=0 NumRow=1 SeatGap=0.45 SeatPitch=1
  custom script SeatGroup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

Wing "EH"
  location (X Y Z) 5.4 0 3.5, rotation 0 0 0
  symmetric about XZ
  bounding box size 1.2 5.4 0.12007
  totals: TotalSpan=5.4 TotalProjectedSpan=5.4 TotalChord=0.95 TotalArea=5.13 TotalAR=5.68421
  root: chord 1.2, twist 0, NACA 4-series Camber=0 CamberLoc=0.2 ThickChord=0.1
  sections:
    n  Span  Root_Chord  Tip_Chord  Area   Sweep  Sweep_Location  Dihedral  Twist  Twist_Location  tip airfoil
    1  2.7   1.2         0.7        2.565  10     0               0         0      0.25            NACA 4-series Camber=0 CamberLoc=0.15 ThickChord=0.1

Wing "EV"
  location (X Y Z) 4.5 0 1.9, rotation 90 0 0
  bounding box size 1.86603 0.156791 1.5
  totals: TotalSpan=1.5 TotalProjectedSpan=1.5 TotalChord=1.2835 TotalArea=1.92525 TotalAR=1.16868
  root: chord 1.567, twist 0, NACA 4-series Camber=0 CamberLoc=0.2 ThickChord=0.1
  sections:
    n  Span  Root_Chord  Tip_Chord  Area     Sweep  Sweep_Location  Dihedral  Twist  Twist_Location  tip airfoil
    1  1.5   1.567       1          1.92525  30     0               0         0      0.25            as above

VSPAERO settings: Sref=28 bref=18.5318 cref=1.51386 Xcg=0 Ycg=0 Zcg=0 AlphaStart=-10 AlphaEnd=10 AlphaNpts=11 BetaStart=0 BetaEnd=0 BetaNpts=1 MachStart=0 MachEnd=0 MachNpts=1 ReCref=1e+07 Vinf=100 Rho=0.002377
